# AguaClara Water Treatment Plants
# Automated Design
# Add variable descriptions next to every varible so it is easy to interpret what this all means.
AguaClaraDesignToolVersion := 10  # This is used by LabVIEW to confirm that a valid design tool program is open
# User Inputs:
HW_Sed := 2 m
# Design References
# [reference: BasicInputs.xmcd]
# Use BasicClientInputs and ExpertClientInputs when this is run by LabVIEW.
# Use BasicInputs and ExpertInputs to use the program in MathCAD
# Change the reference by
# - right clicking
# - select properties
# - reference tab
# - type in the correct file name
# [reference: ExpertInputs.xmcd]
# [reference: DesignAssumptions.xmcd]
# [reference: MathFunctions.xmcd]
# [reference: PipeDatabase.xmcd]
# [reference: MinorLossCoefficients.xmcd]
# [reference: FluidsFunctions.xmcd]
# Sed Tanks and Slopes:
# [reference: Influent Sed Manifold.xmcd]
N_SedTanks = 3
B_SedPort = 5.85864 cm  # Height of the narrowest part of the manifold ports
W_SedPort = 5.85864 cm
H_SedBetween = 7.62 cm  # Distance from the top of the inlet manifold to the bottom of the ledge supporting the lamella frame
N_SedPorts = 45  # per bay
L_Sed = 9.52822 m
N_SedBays = 2  # Number of bays of inlet manifolds in each sed tank
A_SedPort = 34.3237 cm^2  # Port Area
L_SedPort = 6.76498 cm  # Length of the port through which water exits the inlet manifold
W_SedSludgeFlat = 5 cm  # Distance between tips of manifold plates (space alloted for the drain holes
W_SedSlopePlate = 30 cm  # Width of ferrous cement plates in whice one manifold port is cut
AN_SedTopInlet = 60 deg  # Angle of the top of the inlet manifold
Q_SedBay = 8.33333 L/s
AN_SedBottom = 10 deg  # Angle of the bottom of inlet manifold
# Sedimentation Tank Sludge Drain:
# [reference: SludgeDrain.xmcd]
N_SedSludgeOrifices = 63  # per cell
W_SedSludge = 13.7869 cm  # Width of the sludge channel
Ti_SludgeDrain = 10 min  # Tank Drain time
H_SedSludge = 5 cm  # Depth of the sludge channel
B_SedSludgeOrifices = 15 cm  # Distance center to center between drain orifices
T_SedSludge = 9.33013 cm
# Thickness of the plate topping the sludge channel
# through which drain holes are formed
D_SedSludgeOrifice = 0.4375 in  # Diameter of drain orifices
# Sedimentation Tank Dimensions:
# [reference: Sedimentation Dimensions.xmcd]
Z_SedSludge = 14.3301 cm  # Height from 0 of the top of the sludge drain
H_SedBottomSlope = 0.0765169 m  # Height of the bottom slope
H_SedTopSlope = 0.70832 m  # Height of the top of the inlet manifold
Z_SedSlopes = 0.951621 m  # Height from 0 of the top of the inlet manifold
H_Sed = 2.1 m  # Total tank wall height
W_Sed = 2.159 m  # Total tank width
L_Sed = 9.52822 m  # Total tank length
# Inlet Channel:
# [reference: Inlet Channel.xmcd]
W_InletChannel = 0.596394 m
L_Channel = 6.927 m
W_SedManifoldEntrance = 0.172129 m  # Width of the drop chimneys connecting channel to sed inlet manifolds
L_SedManifoldEntrance = 0.433949 m  # length of drop chimmneys
N_SedInletPipes = 2  # per sed bay
H_InletChannel = 0.922179 m
# Sedimentation Tank Effluent Launder:
# [reference: Launder.xmcd]
N_SedLaunderOrifices = 162  # Number of orifices per launder
# How many launders per cell?
# What is the spacing of the orfices?
# How many rows of orifices per launder?
Q_SedLaunderOrifices = 1.54321 L/min
B_SedLaunderOrifices = 0.1 m  # Center to center launder spacing
# Exit Channel:
# [reference: Exit Channel.xmcd]
W_ExitChannel = 0.596394 m
ND_SedLaunder = 6 in
H_ExitChannel = 0.922179 m
L_SedLaunder = 8.18543 m
L_ExitChannel = 6.927 m
H_PltWeir = 0.687803 m  # height of the weir carrying water to the distribution tank
D_SedLaunderOrifice = 0.3125 in
HW_ExitChannel = 0.782179 m
Z_SedLaunder = 1.87586 m  # height from 0 of the launder
ZW_ExitChannel = 1.96 m  # water height in exit channel from 0
# Lamella:
# [reference: Lamella.xmcd]
L_SedPlate = 0.812423 m
B_SedPlate = 4.50494 cm  # center to center distance between lamella
S_SedPlate = 4.20494 cm  # spacing between lamella
N_SedPlates = 148  # Number of Sed Plates per Sedimentation Tank Bay.
AN_SedPlate = 60 deg
V_SedC = 10.0065 m/day
V_SedUp = 70 m/day
H_SedPlate = 0.703579 m
H_SedAbove = 0.208275 m  # Height of water needed above the lamella
# Sedimentation Tank Floc Hopper:
# [reference: Floc Hopper.xmcd]
A_FlocHopper = 2.592 m^2
L_FlocHopper = 2.58039 m  # Length of the hopper cement plate
L_FlocHopperOffset = 0.406211 m  # distance from the edge of the channel to the bottom of the first lamella (collection distance)
W_FlocHopper = 1.0045 m  # width of the hopper set within each bay
# Flow Controller:
# [reference: FCM.xmcd]
N_Fcm = 6
ID_FcmTube = 4.318 mm
ID_FcmTube = 0.17 in
L_FcmTube = 257.56 cm
Q_FcmTubeMax = 375 mL/min
HL_FcmValve = 26.1265 cm
# Flocculator: | Look at Flocculator Positioning arrays
# [reference: Flocculation Energy Dissapation.xmcd]
W_FlocChannel = 0.719212 m
L_Sed = 9.52822 m  # Fill last channel with bafffles from last channel
# Fix port width to be based on energy dissipation in that channel
# Adjust spacing after the number of baffles per channel is known.
ED_Floc = [6.4; 1.6; 0.4] mW/kg
# Check the residence time of the flocculator should be at least 20minutes
S_FlocBaffle = [3968.5; 6299.61; 10000] cm
B_FlocBaffle = [396870; 629981; 1000020] cm
HW_FlocEnd = 2 m
L_FlocBaffles =  # no stored result
X_FlocBaffles =  # no stored result
N_FlocChannels = 44672
L_FlocTank = 425645 m
N_FlocBaffleSection = [21; 21; 21]
3*21 = 63
HL_Floc = 0.20429 cm
HW_FlocStart = 2.00204 m
Z_FlocBaffles =  # no stored result
W_FlocPort = 100 m
H_FlocPort = 0.006285 m
Ti_Floc = 204086 min  # residence time of the flocculator
# Entrance Tank:
# [reference: EntranceTankDim.xmcd]
L_Et = 9.52822 m  # length of the entrance tank
W_Et = 0.719212 m  # width of the entrance tank
HW_EtMin = 0.2 m
HW_EtMax = 0.4 m
H_Et = 2.40204 m  # height of the entrance tank
ZW_Et = 2.30204 m
# Any additional needed elevations should be calculated in the files above.
# Elevations:
ZW_ExitChannel = 1.96 m  # Water Level at the end of the plant in the exit channel and exit channel box
HW_Sed = 2 m
HW_FlocStart = 2.00204 m  # Water level at the beginning of the floc tank
HL_Floc = 0.20429 cm  # just for ref. the head loss throught the floc tank
ZW_Et = 2.30204 m  # the height of the water in the entrance tank.
# Rapid Mix:
# [reference: RapidMixer.xmcd]
ED_Diffusion = 0.732512 m^2/s^3  # Minimum Energy Dissipation needed
HL_FlocEntryOrifice = 0.0713979 m  # Head loss caused by entering flocculation tank.
A_FlocEntry = 0.0873298 m^2  # Area required of entry port to flocculator
L_FlocEntryOrifice = 0.13 m
W_FlocEntryOrifice = 0.671767 m
HW_EtMax = 0.2 m
A_EtOrifice = 0.0400718 m^2
L_trueET[30] = 1.29264 m  # Assumption for now
W_EtOrifice[30] = 0.031 m
HW_EtMin[30] = 0.0155 m
Pi_EtFlow[30] = 0.278388
HW_EtChannel[30] = 0.0759183 m
HW_Channel2 = 0.138762 m
HW_Total = 2.48812 m
L_Et = 2.48424 m  # Length of sqaure entrance tank
Vol_Stock = 4050 L
# AutoCAD References
